! ====================================================================
! CENARIO D: BESS DISTRIBUIDO NOS TRAFOS CRITICOS (3 x 50 kW / 150 kWh)
! ====================================================================
Redirect "Cenario_B_Expansao_FV_VE.dss"

! Curva de despacho do BESS Distribuido (24 horas, intervalo 1h)
! Valores negativos = Carga / Recarga (25 kW @ -0.5 mult)
! Valores positivos = Descarga no pico (45 kW @ 0.9 mult nas horas 19h-21h; 20 kW @ 0.4 mult na hora 18h)
New Loadshape.BESS_Dist_Shape npts=24 interval=1.0 mult=[0.0 -0.5 -0.5 -0.5 0.0 0.0 0.0 0.0 0.0 0.0 0.0 -0.5 -0.5 0.0 0.0 0.0 0.0 0.4 0.9 0.9 0.9 0.0 0.0 0.0]

! 3 BESS de 50 kW / 150 kWh na Baixa Tensao (0.22 kV) dos 3 transformadores mais carregados
New Generator.BESS_DIST_1193581 phases=3 bus1=BT_STO33_30362.1.2.3 kv=0.22 kw=50 pf=1.0 model=1 daily=BESS_Dist_Shape
New Generator.BESS_DIST_1193923 phases=3 bus1=BT_STO33_30651.1.2.3 kv=0.22 kw=50 pf=1.0 model=1 daily=BESS_Dist_Shape
New Generator.BESS_DIST_1193996 phases=3 bus1=BT_STO33_30717.1.2.3 kv=0.22 kw=50 pf=1.0 model=1 daily=BESS_Dist_Shape

New Monitor.Mon_BESS_D1 element=Generator.BESS_DIST_1193581 terminal=1 mode=1
New Monitor.Mon_BESS_D2 element=Generator.BESS_DIST_1193923 terminal=1 mode=1
New Monitor.Mon_BESS_D3 element=Generator.BESS_DIST_1193996 terminal=1 mode=1
